// COMSOL Multiphysics 5.0.0.243 model "EMAT-2D.mph"
// Outline of the model tree

Parameters
  M = 750[kA/m]
  I0 = 20
  Area_cross = pi*r*r
  fc = 200[kHz]
  r = 0.5
  turns = 500
  J0 = I0*turns/Area_cross
  F0 = 200[kHz]
  omega0 = 2*pi*F0

Variables
  var1 "Variables 1"
    F_x = mf.Jiy*mfnc.By
    F_y = mf.Jix*mfnc.Bx

Selections
  sel1: Explicit "Plate" on domains 2
  sel2: Explicit "plate boundaries" on boundaries adjacent to domains 2

Geometry
  geom1 "Geometry 1" (2D, length unit mm)
    r1: Rectangle | size = {200, 5}
    r2: Rectangle | pos = {90, 8}; size = {20, 5}
    r3: Rectangle | pos = {-5, 0}; size = {210, 20}
    c1: Circle | pos = {101, 6.5}; r = 0.5
    c2: Circle | pos = {104, 6.5}; r = 0.5
    c3: Circle | pos = {107, 6.5}; r = 0.5
    c4: Circle | pos = {98, 6.5}; r = 0.5
    c5: Circle | pos = {95, 6.5}; r = 0.5
    c6: Circle | pos = {92, 6.5}; r = 0.5
    fin: Finalize "Form Union"

Materials
  mat1: Common "UNS C10100 (OFE) (UNS C10100) [solid,residual resistivity ratio of 30]" on domains 4-9
    def "Basic"
      dL = (dL_solid_1(T[1/K])-dL_solid_1(Tempref[1/K]))/(1+dL_solid_1(Tempref[1/K]))
      CTE = CTE_solid_1(T[1/K])[1/K]
      thermalconductivity = k_solid_residual_resistivity_ratio_of_30_1(T[1/K])[W/(m*K)]
      thermalexpansioncoefficient = (alpha_solid_1(T[1/K])[1/K]+(Tempref-293[K])*if(abs(T-Tempref)>1e-3,(alpha_solid_1(T[1/K])[1/K]-alpha_solid_1(Tempref[1/K])[1/K])/(T-Tempref),d(alpha_solid_1(T[1/K]),T)[1/K]))/(1+alpha_solid_1(Tempref[1/K])[1/K]*(Tempref-293[K]))
      heatcapacity = C_solid_1(T[1/K])[J/(kg*K)]
      mu = mu(T[1/K])[Pa]
      density = rho_solid_1(T[1/K])[kg/m^3]
      kappa = kappa(T[1/K])[Pa]
      electricconductivity = 5.96e7
      relpermittivity = 6
      relpermeability = 1.256e-6
      dL_solid_1: Piecewise
        arg = T
        extrap = constant
        pieces = 
          {4.0, 80.0, -0.003272586-6.837087E-8*T^1+1.574823E-8*T^2+3.040518E-10*T^3}
          {80.0, 250.0, -0.003491523+2.12144E-6*T^1+5.197613E-8*T^2-6.339761E-11*T^3}
          {250.0, 800.0, -0.004355177+1.293125E-5*T^1+7.341229E-9*T^2-2.541027E-12*T^3}
          {800.0, 1273.0, -0.004359242+1.427188E-5*T^1+3.639858E-9*T^2}
      CTE_solid_1: Piecewise "Piecewise 1a"
        arg = T
        extrap = constant
        pieces = 
          {4.0, 13.0, -8.574809E-9+4.13567E-9*T^1-5.673583E-10*T^2+5.520915E-11*T^3}
          {13.0, 60.0, 2.194122E-7-2.662325E-8*T^1+4.800942E-10*T^2+6.093443E-11*T^3-6.195564E-13*T^4}
          {60.0, 250.0, -8.81E-6+3.292355E-7*T^1-1.773823E-9*T^2+4.545667E-12*T^3-4.483983E-15*T^4}
          {250.0, 800.0, 1.104756E-5+2.743089E-8*T^1-3.159431E-11*T^2+1.370433E-14*T^3}
      k_solid_residual_resistivity_ratio_of_30_1: Piecewise "Piecewise 1b"
        arg = T
        extrap = constant
        pieces = 
          {1.0, 40.0, 12.55868+36.66487*T^1+1.387207*T^2-0.07168113*T^3+6.99799E-4*T^4}
          {40.0, 70.0, 2174.919-45.25448*T^1+0.3738471*T^2-9.504397E-4*T^3}
          {70.0, 100.0, 2545.87-67.53869*T^1+0.8176488*T^2-0.004470238*T^3+9.22619E-6*T^4}
          {100.0, 300.0, 555.4-2.116905*T^1+0.008971429*T^2-1.266667E-5*T^3}
          {300.0, 1358.0, 423.7411-0.3133575*T^1+0.001013916*T^2-1.570451E-6*T^3+1.06222E-9*T^4-2.64198E-13*T^5}
      alpha_solid_1: Piecewise "Piecewise 1c"
        arg = T
        extrap = constant
        pieces = 
          {4.0, 100.0, 1.104402E-5+4.812192E-8*T^1-1.223083E-10*T^2}
          {100.0, 210.0, 1.276495E-5+1.849516E-8*T^1+1.203963E-11*T^2-1.023671E-13*T^3}
          {210.0, 800.0, 1.47252E-5+8.137386E-9*T^1-4.58414E-12*T^2}
          {800.0, 1273.0, 1.83456E-5-1.577095E-9*T^1+1.908643E-12*T^2}
      C_solid_1: Piecewise "Piecewise 1d"
        arg = T
        extrap = constant
        pieces = 
          {1.0, 18.0, 0.008168055+0.00104457*T^1+0.003441219*T^2+2.847033E-4*T^3+2.246429E-5*T^4}
          {18.0, 60.0, 29.05972-3.767169*T^1+0.1540539*T^2-0.001048364*T^3+3.010206E-7*T^4}
          {60.0, 300.0, -215.2814+8.236392*T^1-0.04732108*T^2+1.291112E-4*T^3-1.357031E-7*T^4}
          {300.0, 1300.0, 342.764+0.1338348*T^1+5.535252E-5*T^2-1.971221E-7*T^3+1.140747E-10*T^4}
      mu: Piecewise | arg = T; extrap = constant; pieces = {4.0, 300.0, 5.12E10+4.718448E-7*T^1-46300.0*T^2}
      rho_solid_1: Piecewise "Piecewise 1e"
        arg = T
        extrap = constant
        pieces = 
          {4.0, 90.0, 9028.155+0.001936185*T^1-4.310034E-4*T^2-8.227902E-6*T^3}
          {90.0, 250.0, 9034.264-0.05885933*T^1-0.001406238*T^2+1.736657E-6*T^3}
          {250.0, 800.0, 9062.242-0.3913962*T^1-8.947644E-5*T^2}
          {800.0, 1273.0, 9038.962-0.3593546*T^1-9.31574E-5*T^2}
      kappa: Piecewise | arg = T; extrap = constant; pieces = {4.0, 300.0, 1.408545E11-151138.5*T^1-155999.5*T^2}
    Enu "Young's modulus and Poisson's ratio"
      youngsmodulus = E(T[1/K])[Pa]
      poissonsratio = nu(T[1/K])
      E: Piecewise
        arg = T
        extrap = constant
        pieces = 
          {4.0, 300.0, 1.37E11-3.330669E-6*T^1-127000.0*T^2}
          {300.0, 1250.0, 1.408492E11-4.703751E7*T^1-12923.82*T^2}
      nu: Piecewise | arg = T; extrap = constant; pieces = {4.0, 300.0, 0.3378748+7.672235E-7*T^1-3.529109E-8*T^2}
  mat2: Common "9 Ni steel (UNS K81340) [solid,heat treat at 1172K]" on domains 2
    def "Basic"
      dL = (dL(T[1/K])-dL(Tempref[1/K]))/(1+dL(Tempref[1/K]))
      CTE = CTE(T[1/K])[1/K]
      thermalconductivity = k(T[1/K])[W/(m*K)]
      Syt = Syt_solid_heat_treat_at_1172K_1(T[1/K])[Pa]
      elong = elong(T[1/K])
      thermalexpansioncoefficient = (alpha(T[1/K])[1/K]+(Tempref-293[K])*if(abs(T-Tempref)>1e-3,(alpha(T[1/K])[1/K]-alpha(Tempref[1/K])[1/K])/(T-Tempref),d(alpha(T[1/K]),T)[1/K]))/(1+alpha(Tempref[1/K])[1/K]*(Tempref-293[K]))
      density = rho(T[1/K])[kg/m^3]
      electricconductivity = 1.45e6
      relpermittivity = 1
      relpermeability = 1
      dL: Piecewise
        arg = T
        extrap = constant
        pieces = 
          {52.0, 255.0, -0.002230062+2.429059E-6*T^1+1.827701E-8*T^2}
          {255.0, 811.0, -0.002986531+9.167586E-6*T^1+3.335772E-9*T^2+5.587964E-13*T^3}
      CTE: Piecewise
        arg = T
        extrap = constant
        pieces = 
          {52.0, 255.0, 5.089427E-6+2.380978E-8*T^1-1.485258E-11*T^2}
          {255.0, 811.0, 5.089427E-6+2.380978E-8*T^1-1.485258E-11*T^2}
      k: Piecewise | arg = T; extrap = constant; pieces = {52.0, 811.0, 6.95337+0.1164695*T^1-1.403055E-4*T^2+4.413869E-8*T^3}
      Syt_solid_heat_treat_at_1172K_1: Piecewise | arg = T; extrap = constant; pieces = {293.0, 755.0, 3.519867E9-2.173121E7*T^1+61024.44*T^2-73.13454*T^3+0.03081301*T^4}
      elong: Piecewise | arg = T; extrap = constant; pieces = {293.0, 755.0, -198.012+2.495312*T^1-0.01052593*T^2+2.096944E-5*T^3-1.981629E-8*T^4+7.167796E-12*T^5}
      alpha: Piecewise
        arg = T
        extrap = constant
        pieces = 
          {52.0, 200.0, 7.31194E-6+2.440485E-8*T^1-3.743332E-11*T^2}
          {200.0, 811.0, 8.645771E-6+1.346753E-8*T^1-1.830861E-11*T^2+1.110422E-14*T^3}
      rho: Piecewise
        arg = T
        extrap = constant
        pieces = 
          {52.0, 255.0, 8000.055+0.02696048*T^1-0.0010683*T^2+1.364399E-6*T^3}
          {255.0, 811.0, 8020.54-0.2149727*T^1-9.069112E-5*T^2}
    Enu "Young's modulus and Poisson's ratio"
      youngsmodulus = E(T[1/K])[Pa]
      poissonsratio = 0.33
      E: Piecewise | arg = T; extrap = constant; pieces = {75.0, 311.0, 2.167248E11-1.571993E8*T^1+237365.9*T^2}
    ElastoplasticModel "Elastoplastic material model"
      sigmags = Sys_solid_heat_treat_at_1172K_1(T[1/K])[Pa]
      Hillcoefficients = {0, 0, 0, 0, 0, 0}
      ys = {0, 0, 0, 0, 0, 0}
      Sys_solid_heat_treat_at_1172K_1: Piecewise | arg = T; extrap = constant; pieces = {293.0, 755.0, 2.402313E9-1.381507E7*T^1+38206.91*T^2-46.19104*T^3+0.02002275*T^4}
  mat3: Common "Neodymium [solid]" on domains 3
    def "Basic"
      dL = (dL(T[1/K])-dL(Tempref[1/K]))/(1+dL(Tempref[1/K]))
      thermalconductivity = k_solid_1(T[1/K])[W/(m*K)]
      resistivity = res_solid_1(T[1/K])[ohm*m]
      thermalexpansioncoefficient = (alpha(T[1/K])[1/K]+(Tempref-293[K])*if(abs(T-Tempref)>1e-3,(alpha(T[1/K])[1/K]-alpha(Tempref[1/K])[1/K])/(T-Tempref),d(alpha(T[1/K]),T)[1/K]))/(1+alpha(Tempref[1/K])[1/K]*(Tempref-293[K]))
      heatcapacity = C_solid_1(T[1/K])[J/(kg*K)]
      HC = HC_solid_1(T[1/K])[J/(mol*K)]
      electricconductivity = sigma_solid_1(T[1/K])[S/m]
      density = rho(T[1/K])[kg/m^3]
      VP = VP_solid_1(T[1/K])[Pa]
      relpermeability = 1.05
      relpermittivity = 1
      dL: Piecewise | arg = T; extrap = constant; pieces = {293.0, 1073.0, -0.001402566+3.468765E-6*T^1+4.714476E-9*T^2-7.3607E-13*T^3}
      k_solid_1: Piecewise | arg = T; extrap = constant; pieces = {200.0, 1135.0, 17.78831-0.0111627*T^1+2.799204E-5*T^2-1.786306E-8*T^3+4.616206E-12*T^4}
      res_solid_1: Piecewise "Piecewise 1a" | arg = T; extrap = constant; pieces = {25.0, 360.0, 1.21315E-7+3.393217E-9*T^1-5.603705E-12*T^2+3.678486E-15*T^3}
      alpha: Piecewise | arg = T; extrap = constant; pieces = {293.0, 1073.0, 4.786916E-6+4.498807E-9*T^1-7.3607E-13*T^2}
      C_solid_1: Piecewise "Piecewise 1b" | arg = T; extrap = constant; pieces = {293.0, 1128.0, 174.2705+0.02786755*T^1+8.444596E-5*T^2+4.110469E-9*T^3}
      HC_solid_1: Piecewise "Piecewise 1c" | arg = T; extrap = constant; pieces = {293.0, 1128.0, 25.13678+0.004019616*T^1+1.218048E-5*T^2+5.928941E-10*T^3}
      sigma_solid_1: Piecewise "Piecewise 1d" | arg = T; extrap = constant; pieces = {25.0, 360.0, 1/(3.678486E-15*T^3-5.603705E-12*T^2+3.393217E-09*T+1.213150E-07)}
      rho: Piecewise | arg = T; extrap = constant; pieces = {293.0, 1073.0, 7029.54-0.07324197*T^1-9.92628E-5*T^2+1.754625E-8*T^3}
      VP_solid_1: Piecewise "Piecewise 1e" | arg = T; extrap = constant; pieces = {293.0, 1297.0, (exp((-1.726400e+004/T-9.519000e-001*log10(T)+1.187681e+001)*log(10.0)))*1.333200e+002}
  mat4: Common "Air" on domains 1
    def "Basic"
      relpermeability = 1
      relpermittivity = 1
      dynamicviscosity = eta(T[1/K])[Pa*s]
      ratioofspecificheat = 1.4
      electricconductivity = 0[S/m]
      heatcapacity = Cp(T[1/K])[J/(kg*K)]
      density = rho(pA[1/Pa],T[1/K])[kg/m^3]
      thermalconductivity = k(T[1/K])[W/(m*K)]
      soundspeed = cs(T[1/K])[m/s]
      eta: Piecewise | arg = T; extrap = constant; pieces = {200.0, 1600.0, -8.38278E-7+8.35717342E-8*T^1-7.69429583E-11*T^2+4.6437266E-14*T^3-1.06585607E-17*T^4}
      Cp: Piecewise | arg = T; extrap = constant; pieces = {200.0, 1600.0, 1047.63657-0.372589265*T^1+9.45304214E-4*T^2-6.02409443E-7*T^3+1.2858961E-10*T^4}
      rho: Analytic | expr = pA*0.02897/8.314/T; args = {pA, T}; dermethod = manual; argders = {{pA, d(pA*0.02897/8.314/T,pA)}, {T, d(pA*0.02897/8.314/T,T)}}
      k: Piecewise | arg = T; extrap = constant; pieces = {200.0, 1600.0, -0.00227583562+1.15480022E-4*T^1-7.90252856E-8*T^2+4.11702505E-11*T^3-7.43864331E-15*T^4}
      cs: Analytic | expr = sqrt(1.4*287*T); args = T; dermethod = manual; argders = {T, d(sqrt(1.4*287*T),T)}
    RefractiveIndex
      n = 1
      ki = 0

Physics
  mf: InductionCurrents "Magnetic Fields" on all domains
    dependent variable A = {Ax, Ay, Az}
    EquationForm.form = Transient
    BackgroundField.SolveFor = ReducedField
    BackgroundField.Ab = {0, 0, 0}
    MeshControl.EnableMeshControl = 1
    al1: AmperesLaw "Ampère's Law 1" (default) | epsilonr_mat = from_mat; materialType = solid
    mi1: MagneticInsulation (default)
    init1: init "Initial Values 1" (default) | A = {0, 0, 0}
    ecd1: ExternalCurrentDensity on domains 7-9 | Je = {0, 0, J0*sin(2*pi*F0*t)*(1-cos(omega0*t/2))* (t<=1.6e-5)}
    ecd2: ExternalCurrentDensity on domains 4-6 | Je = {0, 0, -J0*sin(2*pi*F0*t)*(1-cos(omega0*t/2))* (t<=1.6e-5)}
  mfnc: MagnetostaticsNoCurrents "Magnetic Fields, No Currents" on domains 2, 3
    dependent variable Vm
    mfc1: MagneticFluxConservation (default)
    mi1: MagneticInsulation (default)
    init1: init "Initial Values 1" (default)
    mfc2: MagneticFluxConservation on domains 3 | ConstitutiveRelationH = Magnetization; M = {0, -M, 0}
  solid: SolidMechanics on domains 2
    dependent variable u = {u, v, w}
    lemm1: LinearElasticModel "Linear Elastic Material 1" (default)
    free1: Free (default)
    init1: init "Initial Values 1" (default)
    bl1: BodyLoad on domains 2 | LoadType = ForceVolume; FperVol_src = userdef; FperVol = {F_x, F_y, 0}
    fix1: Fixed "Fixed Constraint 1" on boundaries 2, 5, 12

Mesh
  mesh4 "Mesh 4"
    size: MeshSizeDefault | hmax = 2; hmin = 1; hauto = 5
    ftri1: FreeTri "Free Triangular 1" on domains 2
      size1: Size on domains 2 | hmax = 2; hmin = 1; hauto = 5; custom = on
  mesh5 "Mesh 5"
    size: MeshSizeDefault | hauto = 5; custom = on
    size1: Size on entire geometry | hauto = 5

Studies
  std1 "Study 1"
    time: Transient "Time Dependent" | tlist = range(0,0.00000001,0.00001); physselection = mf; solve for = {mf, solid}
    stat: Stationary | physselection = mf; solve for = {mfnc}; adaption = on

Solver configurations
  sol1 "Solution 1" (study std1)
    v1: Variables "Dependent Variables 1" | scalemethod = auto
      comp1_u: Field "Displacement field (Material) (comp1.u)" | scaleval = 1e-2*4.20119030752
    t1: Time "Time-Dependent Solver 1" | tlist = range(0,0.00000001,0.00001); atolglobalmethod = scaled; atolglobal = 0.01
      dDef: Direct
      fc1: FullyCoupled | linsolver = dDef
    v2: Variables "Dependent Variables 2" | initmethod = sol; notsolmethod = sol
    s1: Stationary "Stationary Solver 1" | stol = 0.01
      dDef: Direct
      adDef: Adaption "Adaptive Mesh Refinement"
      fc1: FullyCoupled | linsolver = dDef
      prob1: SolverProblem "Information 1"
        error1: SolverError "Error 1"
  sol2 "Adaptive Mesh Refinement 1" (study std1)

Datasets
  dset1: Solution | solution = sol1
  cln1: CutLine2D | data = none; method = twopoint; genpoints = {{99.5, 5.99999}, {99.5, 6.99999}}
  cpt1: CutPoint2D | data = dset1; pointx = 100; pointy = 5
  dset2: Solution | solution = sol2

Tables
  mm1: Table "pg1/mms1"
    // Max/min surface
    x | y | Lorentz force contribution, x component (N/m^3)
    49.3 | 21.05 | -57646
    50.7 | 21.05 | 57646

Plots
  pg1: PlotGroup2D "Magnetic Flux Density Norm (mf)" | data = dset1; animating = off
  pg2: PlotGroup1D "1D Plot Group 2" | data = dset1; animating = off
    lngr1: LineGraph on boundaries 6 | expr = mf.JiX
  pg3: PlotGroup2D "2D Plot Group 3" | data = dset1
    con1: Contour | expr = mf.normB
  pg4: PlotGroup2D "Magnetic Flux Density Norm (mf) 1" | data = dset2
    surf1: Surface | expr = mf.normB
  pg5: PlotGroup2D "Stress (solid)" | data = dset2
    surf1: Surface | expr = solid.mises
      def: Deform "Deformation" | expr = {u, v}
  pg6: PlotGroup2D "Magnetic Flux Density Norm (mfnc)" | data = dset2
    surf1: Surface | expr = mfnc.normB

Exports
  play1: Player | autoplay = off
  play2: Player | autoplay = off